// COMSOL Multiphysics 6.2.0.339 model "M2B_anatomical_flow_lymphnode_v01_Model.mph"
// Outline of the model tree

Parameters
  R_node_um = 500  // Simplified lymph-node-inspired outer radius
  R_sinus_inner_um = 430  // Approximate inner boundary of subcapsular sinus
  R_medulla_um = 250  // Simplified medulla radius
  patch_radius_um = 40  // Afferent inlet marker radius
  sensor_radius_um = 30  // Local sensor marker radius
  Dcortex = 8e-11  // Cortex diffusion coefficient in m^2/s
  Dsinus = 1.2e-10  // Subcapsular sinus diffusion coefficient in m^2/s
  r = 0.5  // Dmedulla/Dcortex diffusivity ratio
  Dmedulla = r*Dcortex  // Medulla diffusion coefficient
  v_in = 5e-7  // Prescribed afferent inlet velocity in m/s
  v_in_low = 1e-7  // Low prescribed inlet velocity in m/s
  v_in_ref = 5e-7  // Reference prescribed inlet velocity in m/s
  v_in_high = 1e-6  // High prescribed inlet velocity in m/s
  c0_mol_m3 = 1e-8  // HER2 inlet concentration for 10 pM
  tmax_s = 6000  // Maximum simulated time in seconds

Variables
  var1 "Prescribed porous-flow velocity field"
    r_node = sqrt(x^2+y^2+z^2)
    D_region = if(r_node>R_sinus_inner_um*1e-6,Dsinus,if(r_node<R_medulla_um*1e-6,Dmedulla,Dcortex))
    u_flow = -0.15*v_in*x/(R_node_um*1e-6)
    v_flow = -v_in*(0.25+0.75*(y+R_node_um*1e-6)/(2*R_node_um*1e-6))
    w_flow = -0.10*v_in*z/(R_node_um*1e-6)
    p_proxy = 10[Pa]*(y+R_node_um*1e-6)/(2*R_node_um*1e-6)

Selections
  domain_subcapsular_sinus: Explicit on no domains
  domain_cortex: Explicit on no domains
  domain_medulla: Explicit on no domains
  boundary_afferent_inlet_1: Explicit on no domains
  boundary_afferent_inlet_2: Explicit on no domains
  boundary_afferent_inlet_3: Explicit on no domains
  boundary_afferent_inlet_4: Explicit on no domains
  boundary_efferent_outlet: Explicit on no domains
  boundary_capsule_no_flow: Explicit on no domains
  boundary_sensor_local: Explicit on no domains
  boundary_sensor_full: Explicit on no domains

Geometry
  geom1 "Geometry 1" (3D, length unit µm)
    capsule: Sphere "domain_subcapsular_sinus_and_cortex_outer_node" | r = R_node_um
    sinus_inner: Sphere "domain_cortex_inner_sinus_reference" | r = R_sinus_inner_um
    medulla: Sphere "domain_medulla" | r = R_medulla_um
    aff1: Sphere "boundary_afferent_inlet_1_marker" | pos = {0, 470, 120}; r = patch_radius_um
    aff2: Sphere "boundary_afferent_inlet_2_marker" | pos = {260, 390, 90}; r = patch_radius_um
    aff3: Sphere "boundary_afferent_inlet_3_marker" | pos = {-260, 390, 90}; r = patch_radius_um
    aff4: Sphere "boundary_afferent_inlet_4_marker" | pos = {0, 360, -250}; r = patch_radius_um
    efferent: Sphere "boundary_efferent_outlet_marker" | pos = {0, -475, 0}; r = 55
    sensor_local: Sphere "boundary_sensor_local_marker" | pos = {0, -225, 120}; r = sensor_radius_um
    fin: Finalize "Form Union"

Physics
  tds: DilutedSpecies "Convection-diffusion scaffold for HER2" on all domains
    dependent variable c
    cdm1: ConvectionDiffusionMigration "Transport Properties 1" (default) | D_c = D_region
    nflx1: NoFlux (default)
    init1: init "Initial Values 1" (default) | initc = 0

Mesh
  mesh1 "Mesh 1" (physics-controlled)
    size: MeshSizeDefault | hauto = 4

Studies
  std1 "Study 1"
    time: Transient "Time Dependent" | tlist = {0, 100, 500, 1000, 2000, 4000, 6000}