// COMSOL Multiphysics 6.2.0.339 model "M2_3D_diffusion_lymphnode_v01_sweep_r_0.25.mph"
// Outline of the model tree

Parameters
  R_cortex_um = 500  // Outer lymph-node-inspired radius in um
  R_medulla_um = 250  // Inner medulla radius in um
  Dcortex = 8e-11  // Cortex diffusion coefficient in m^2/s
  r = 0.25  // Dmedulla/Dcortex diffusivity ratio
  Dmedulla = r*Dcortex  // Medulla diffusion coefficient
  c0_mol_m3 = 1e-8  // Fixed inlet HER2 concentration in mol/m^3
  tmax_s = 6000  // Maximum simulated time in seconds

Selections
  domain_cortex: Explicit on no domains
  domain_medulla: Explicit on no domains
  boundary_inlet: Explicit on no domains
  boundary_wall_no_flux: Explicit on no domains
  boundary_sensor_full: Explicit on no domains
  boundary_sensor_local: Explicit on no domains

Geometry
  geom1 "Geometry 1" (3D, length unit µm)
    cortex: Sphere "domain_cortex_outer_sphere" | r = 500
    medulla: Sphere "domain_medulla_inner_sphere" | r = 250
    fin: Finalize "Form Union"

Physics
  tds: DilutedSpecies "Transport of Diluted Species - HER2" on all domains
    dependent variable c
    cdm1: ConvectionDiffusionMigration "Transport Properties 1" (default)
      D_c = if(sqrt(x^2+y^2+z^2)<R_medulla_um*1e-6,Dmedulla,Dcortex)
    nflx1: NoFlux (default)
    init1: init "Initial Values 1" (default) | initc = 0
    conc1: Concentration "Fixed HER2 source concentration" on all boundaries | c0 = c0_mol_m3

Mesh
  mesh1 "Mesh 1" (physics-controlled)
    size: MeshSizeDefault | hauto = 4

Studies
  std1 "Study 1"
    time: Transient "Time Dependent" | tlist = {0, 100, 500, 1000, 2000, 4000, 6000}

Solver configurations
  sol1 "Solution 1" (study std1)
    v1: Variables "Dependent Variables 1"
    t1: Time "Time-Dependent Solver 1"
      fc1: FullyCoupled
      d1: Direct "Direct, concentrations (tds)"

Datasets
  dset1: Solution | solution = sol1